####################################################################
# GLOBAL VARIABLES

variable T equal 300.0
variable TH equal 1000.0
variable eqout equal 100000
variable pout equal 100000
variable nout equal 100000
variable dt equal 0.002
variable tdamp equal 1.249

####################################################################
# INITIALIZATION

units nano
dimension 3
boundary p p p
box tilt large

#####################################################################
# INTERACTION POTENTIAL

atom_style molecular
atom_modify map array

read_data 62mt_350fil_rerelax.data  extra/bond/per/atom 10 extra/angle/per/atom 10 extra/dihedral/per/atom 10 extra/special/per/atom 25

molecule mol1 premolecule.data
molecule mol2 post-molecule.data
molecule mol3 premolecule-fil.data
molecule mol4 post-molecule-fil.data

pair_style lj/cut 6.735
pair_modify shift yes
pair_coeff 1 1 4.14195 6.0 6.735
pair_coeff 1 2 4.14195 5.2 5.837
pair_coeff 1 3 4.14195 6.0 40
pair_coeff 1 4 4.14195 6.0 40
pair_coeff 2 2 4.14195 5.2 5.837
pair_coeff 2 3 4.14195 5.2 40
pair_coeff 2 4 4.14195 5.2 40
pair_coeff 3 3 4.14195 5.2 40
pair_coeff 3 4 4.14195 5.2 40
pair_coeff 4 4 4.14195 5.2 40

bond_style harmonic
bond_coeff 1 2839 6.0
bond_coeff 2 3150 4.0
bond_coeff 3 13700 5.2
bond_coeff 4 2839 4.0
bond_coeff 5 2839 4.0
bond_coeff 6 2839 4.0
bond_coeff 7 2839 4.0

angle_style harmonic
angle_coeff 1 4140 180.0
angle_coeff 2 2000 180.0
angle_coeff 3 40 80.0
angle_coeff 4 40 100.0

dihedral_style harmonic
dihedral_coeff 1 40.5 1 1

special_bonds lj  0.0  0.0  1.0

neighbor 3.0 bin
neigh_modify delay 0 every 1 check yes

comm_modify cutoff 60 vel yes

comm_style tiled
fix fixbalance all balance 1000000 1.2 rcb

#####################################################################
# SET EQUILIBRATION OUTPUT

variable Step equal "step"
variable Temp equal "temp"
variable EK equal "ke"
variable EP equal "pe"
variable Etot equal "etotal"
variable Epair equal "epair"
variable Ebond equal "ebond"
variable Eangle equal "eangle"
variable Edihedral equal "edihed"
variable Vol equal  "vol"
variable Pxx equal "pxx"
variable Pyy equal "pyy"
variable Pzz equal "pzz"
variable Density equal "density"
variable Press equal "press"
variable Lx equal "lx"
variable Ly equal "ly"
variable Lz equal "lz"

#####################################################################
# Minimize the system's energy

min_style cg
minimize 1.0e-16 1.0e-16 100000 100000
reset_timestep 0

##########################################################################

group lower id 	229	363	728	968	1301	1480	1683	2992	3069	3298	3364	3695	4370	4812	5105	5410	5891	6786	6928	7375	7702	7995	8676	8757	8911	9303	9747	9938	10178	10623	10786	10793	10794	11341	11579	12264	12354	12781	13191	13317	13642	13923	14066	14269	14635	15090	15466	15634	15890	16566	17109	17358	18031	18269	18391	18478	18761	19331	19462	19784	19999	20587	20844	20926	21239	21717	21776	22093	22289	23035	23121	23457	23968	24161	24321	25309	25525	25659	26022	26196	26366	26422	26638	26933	27147	27612	28771	29090	29349	29821	30022	30258	30574	31178	31390	31515	31716	31835	32409	32907	33350	33477	3361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

group upper id 	230	362	727	967	1302	1479	1684	2991	3070	3297	3363	3696	3697	4369	4811	5106	5411	5892	6785	6929	7374	7701	7996	8675	8756	8912	9304	9748	9939	10179	10624	10785	11340	11578	12265	12355	12780	13190	13318	13641	13922	14067	14270	14634	15091	15467	15633	15889	16565	17110	17359	18032	18268	18392	18479	18760	19330	19463	19785	19998	20588	20845	20925	21240	21716	21775	22092	22290	23036	23120	23458	23969	24160	24322	25308	25524	25660	26021	26195	26365	26421	26637	26932	27146	27613	28770	29089	29350	29351	29352	29822	30021	30259	30573	31177	31391	31514	31715	31836	32410	32908	33351	33478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

group react_point id  233852	233854	233856	233858	233860	233862	233864	233866	233868	233870	233872	233874	233876	233878	233880	233882	233884	233886	233888	233890	233892	233894	233896	233898	233900	233902	233904	233906	233908	233910	233912	233914	233916	233918	233920	233922	233924	233926	233928	233930	233932	233934	233936	233938	233940	233942	233944	233946	233948	233950	233952	233954	233956	233958	233960	233962	233964	233966	233968	233970	233972	233974	233976	233978	233980	233982	233984	233986	233988	233990	233992	233994	233996	233998	234000	234002	234004	234006	234008	234010	234012	234014	2340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

group boundary union lower upper
group thermo_part subtract all boundary

########################################################################

velocity all create ${T} 135468 loop local units box

velocity boundary set 0.0 0.0 0.0 sum no
fix 1 upper nve/noforce
fix 2 thermo_part nve
fix 3 thermo_part langevin ${T} ${T} ${tdamp} 125684 scale 1  1  scale 2  0.961649 scale 3  1 scale 4  0.961649
fix 4 lower setforce 0.0 0.0 0.0

thermo 10000
thermo_style custom step temp ke pe etotal epair ebond eangle lx ly lz xy vol pxx pyy pzz density
timestep ${dt}
run 100000

reset_timestep 0

########################################################################

bond_style harmonic
bond_coeff 1 2839 6.0
bond_coeff 2 3150 4.0
bond_coeff 3 13700 5.2
bond_coeff 4 2.5 4.0
bond_coeff 5 2.5 4.0
bond_coeff 6 2.5 4.0
bond_coeff 7 2.5 4.0

########################################################################
# REACTION EQUILIBRATION

compute 1 all property/local btype batom1 batom2
compute 2 all bond/local dist engpot force

compute 3 all property/local atype aatom1 aatom2 aatom3
compute 4 all angle/local  theta eng

dump bond_list_relax all local 1000000 BondList_relax.dump index c_1[1] c_1[2] c_1[3] c_2[1] c_2[2] c_2[3]
dump angle_list_relax all local 1000000 AngleList_relax.dump index c_3[1] c_3[2] c_3[3] c_3[4] c_4[1] c_4[2]

velocity all create ${TH} 475869 loop local units box

fix 100 all bond/react reset_mol_ids yes &
     react myrx01 react_point 100 1 40 mol1 mol2 automap.data prob 1.0 454894 &
     react myrx02 react_point 100 1 20 mol3 mol4 automap-fil.data prob 1.0 859403

#fix 100 all bond/react react myrx01 react_point 100 1 40 mol1 mol2 automap.data prob 1.0 859403
#fix 200 all bond/react react myrx02 react_point 100 1 20 mol3 mol4 automap-fil.data prob 1.0 859403

fix 111 all ave/time 10 100 1000 f_100[1] f_100[2] file React_relax.txt
# fix 111 all ave/time 10 100 1000 f_100[2] file React_fil_relax.txt

########################################################################

velocity all create ${TH} 475869 loop local units box
velocity boundary set 0.0 0.0 0.0 sum no
fix 1 upper nve/noforce
fix 2 thermo_part nve
fix 3 thermo_part langevin ${TH} ${TH} ${tdamp} 125684 scale 1  1  scale 2  0.961649 scale 3  1 scale 4  0.961649
fix 4 lower setforce 0.0 0.0 0.0
thermo 10000
thermo_style custom step temp ke pe etotal epair ebond eangle lx ly lz xy vol pxx pyy pzz density
timestep ${dt}
run 20000000

unfix 1
unfix 2
unfix 3
unfix 4
velocity all set 0.0 0.0 0.0 sum no

############################################################################################
# Compute pe/atom

fix deformation_relax all print ${nout} "${Step} ${Temp} ${EK} ${EP} ${Etot} ${Epair} ${Ebond} ${Eangle} ${Edihedral} ${Press} ${Vol} ${Lx} ${Ly} ${Lz} ${Pxx} ${Pyy} ${Pzz} ${Density}" file deformation_relax.txt screen no

############################################################################

compute Peatom_relax all pe/atom
fix Peatom_relax all ave/atom 100 1000 ${nout} c_Peatom_relax
dump Peatom_relax all custom ${pout} Peatom_relax.lammpstrj id type x y z f_Peatom_relax
dump_modify Peatom_relax first yes

# Compute energy

compute Temp all temp
compute E_k all ke
compute E_pe all pe bond angle
compute E_pair all pair lj/cut epair

compute ebond all bond/local engpot
compute eangle all angle/local eng

compute Ebond all reduce sum c_ebond
compute Eangle all reduce sum c_eangle

#####################################################################
# Equilibrition

velocity all create ${T} 135468 loop local units box

velocity boundary set 0.0 0.0 0.0 sum no
fix 1 upper nve/noforce
fix 2 thermo_part nve
fix 3 thermo_part langevin ${T} ${T} ${tdamp} 125684 scale 1  1  scale 2  0.961649 scale 3  1 scale 4  0.961649
fix 4 lower setforce 0.0 0.0 0.0
thermo 10000
thermo_style custom step temp ke pe etotal epair ebond eangle lx ly lz xy vol pxx pyy pzz density
timestep ${dt}
run 50000000

unfix 1
unfix 2
unfix 3
unfix 4
velocity all set 0.0 0.0 0.0 sum no
unfix deformation_relax
uncompute Peatom_relax
unfix Peatom_relax
undump Peatom_relax

uncompute Temp
uncompute E_k
uncompute E_pe
uncompute E_pair
uncompute ebond
uncompute eangle
uncompute Ebond
uncompute Eangle

uncompute 1
uncompute 2
uncompute 3
uncompute 4
undump bond_list_relax
undump angle_list_relax

unfix 111

reset_timestep 0


############################################################################################
# Compute pe/atom

fix deformation all print ${nout} "${Step} ${Temp} ${EK} ${EP} ${Etot} ${Epair} ${Ebond} ${Eangle} ${Edihedral} ${Press} ${Vol} ${Lx} ${Ly} ${Lz} ${Pxx} ${Pyy} ${Pzz} ${Density}" file deformation_shear.txt screen no

# Compute pe/atom

compute Peatom all pe/atom
fix Peatom all ave/atom 100 1000 ${nout} c_Peatom
dump Peatom all custom ${pout} Peatom_shear.lammpstrj id type x y z f_Peatom
dump_modify Peatom first yes

# Compute energy

compute shear_Temp all temp
compute shear_E_k all ke
compute shear_E_pe all pe bond angle
compute shear_E_pair all pair lj/cut epair

compute shear_ebond all bond/local engpot
compute shear_eangle all angle/local eng

compute shear_Ebond all reduce sum c_shear_ebond
compute shear_Eangle all reduce sum c_shear_eangle

# Compute bond energy

compute 11 all property/local btype batom1 batom2
compute 22 all bond/local dist engpot force

compute 33 all property/local atype aatom1 aatom2 aatom3
compute 44 all angle/local  theta eng

dump angle_list_shear all local 1000000 AngleList_shear.dump index c_33[1] c_33[2] c_33[3] c_33[4] c_44[1] c_44[2]

dump bond_list_shear all local 1000000 BondList_shear.dump index c_11[1] c_11[2] c_11[3] c_22[1] c_22[2] c_22[3]

fix 222 all ave/time 10 100 1000 f_100[1] f_100[2] file React_shear.txt

############################################################################################
# Compute force

variable Fx equal -fcm(upper,x)
variable Fy equal -fcm(upper,y)

fix results all ave/time 100 1000 ${nout} c_shear_Temp c_shear_E_k c_shear_E_pe c_shear_E_pair c_shear_Ebond c_shear_Eangle v_Fx v_Fy file Results.txt

#####################################################################
velocity all create ${T} 135468 loop local units box

velocity boundary set 0.0 0.0 0.0 sum no
fix 1 upper nve/noforce
fix 2 thermo_part nve
fix 3 thermo_part langevin ${T} ${T} ${tdamp} 125684 scale 1  1  scale 2  0.961649 scale 3  1 scale 4  0.961649
fix 4 lower setforce 0.0 0.0 0.0

thermo 10000
thermo_style custom step temp ke pe etotal epair ebond eangle lx ly lz xy vol pxx pyy pzz density
timestep ${dt}

############################################################################################
# LOADING
variable dmove equal 0.1
variable nloop equal 10000
# loading
label loading
variable i loop ${nloop}
change_box all xy delta ${dmove} remap units box
run 10000
next i
jump in.62mt_350fil_relax_and_shear loading

write_data 62mt_350fil_relax_and_shear.relax pair ij
